OpenVSP model (file version 5), 3 components.
Geometry view with OpenVSP parameter names; values to 6 digits, angles in degrees, lengths in the model's unit.
Overall bounding box: X_Min=1.43307 X_Len=3.03152 Y_Min=-1.75754 Y_Len=3.51508 Z_Min=-0.0293094 Z_Len=0.229647

Wing "WING"
  location (X Y Z) 1.43312 0 0, rotation 0 0 0
  symmetric about XZ
  bounding box size 1.22559 3.51508 0.0757218
  totals: TotalSpan=3.51508 TotalProjectedSpan=3.51508 TotalChord=0.585848 TotalArea=2.0593 TotalAR=5.99999 MAC=0.585848
  root: chord 0.585848, twist 0, NACA 4-series Camber=0.02 CamberLoc=0.4 ThickChord=0.12
  sections:
    n  Span      Root_Chord  Tip_Chord  Area      Sweep  Sweep_Location  Dihedral  Twist  Twist_Location  tip airfoil
    1  0.878771  0.585848    0.585848   0.514826  20     0               0         0      0.25            NACA 4-series Camber=0 CamberLoc=0.2 ThickChord=0.1
    2  0.878771  0.585848    0.585848   0.514826  20     0               0         0      0.25            as above

Wing "HorizontalTail"
  location (X Y Z) 4.13847 0 0, rotation 0 0 0
  symmetric about XZ
  bounding box size 0.298646 0.895936 0.0358537
  totals: TotalSpan=0.895936 TotalProjectedSpan=0.895936 TotalChord=0.298646 TotalArea=0.267568 TotalAR=2.99999 MAC=0.298646
  root: chord 0.298646, twist 0, NACA 4-series Camber=0 CamberLoc=0.2 ThickChord=0.12
  sections:
    n  Span      Root_Chord  Tip_Chord  Area      Sweep  Sweep_Location  Dihedral  Twist  Twist_Location  tip airfoil
    1  0.447968  0.298646    0.298646   0.133784  0      0               0         0      0.25            NACA 4-series Camber=0 CamberLoc=0.2 ThickChord=0.1

Wing "VerticalTail"
  location (X Y Z) 4.13847 0 0, rotation 90 0 0
  symmetric about XZ
  bounding box size 0.326121 0.0388709 0.200338
  totals: TotalSpan=0.400676 TotalProjectedSpan=0.400676 TotalChord=0.267117 TotalArea=0.107027 TotalAR=1.5 MAC=0.271123
  root: chord 0.323778, twist 0, NACA 4-series Camber=0 CamberLoc=0.2 ThickChord=0.12
  sections:
    n  Span      Root_Chord  Tip_Chord  Area       Sweep  Sweep_Location  Dihedral  Twist  Twist_Location  tip airfoil
    1  0.200338  0.323778    0.210456   0.0535137  30     0               0         0      0.25            NACA 4-series Camber=0 CamberLoc=0.2 ThickChord=0.1
